// SBML level 2 version 4

model Model_1()
  // Van Zon

  // Compartments:
  compartment compartment_1 = 1;

  // Species:
  species A in compartment_1 = 0.012;
  species C0 in compartment_1 = 0.58;
  species C1 in compartment_1 = 0;
  species AC0 in compartment_1 = 0;
  species Cp0 in compartment_1 = 0;
  species Cp1 in compartment_1 = 0;
  species Cp2 in compartment_1 = 0;
  species Cp3 in compartment_1 = 0;
  species Cp4 in compartment_1 = 0;
  species Cp5 in compartment_1 = 0;
  species Cp6 in compartment_1 = 0;
  species AC1 in compartment_1 = 0;
  species AC2 in compartment_1 = 0;
  species C2 in compartment_1 = 0;
  species AC3 in compartment_1 = 0;
  species C3 in compartment_1 = 0;
  species AC4 in compartment_1 = 0;
  species C4 in compartment_1 = 0;
  species AC5 in compartment_1 = 0;
  species C5 in compartment_1 = 0;
  species C6 in compartment_1 = 0;

  // Parameters:
  kAf = 34500000;
  kdps = 0.908;
  kpf = 13.6;

  // Reactions:
  r1: A + C0 -> AC0; compartment_1*(kAf*A*C0 - r1_k2*AC0);
    r1_k2 = 10;
  r2: AC0 => C1 + A; compartment_1*kpf*AC0;
  r3: Cp1 => Cp0; compartment_1*kdps*Cp1;
  reaction_4: Cp2 => Cp1; compartment_1*kdps*Cp2; reaction_4 is "reaction_1";
  reaction_5: Cp3 => Cp2; compartment_1*kdps*Cp3; reaction_5 is "reaction_2";
  reaction_6: Cp4 => Cp3; compartment_1*kdps*Cp4; reaction_6 is "reaction_3";
  reaction_7: Cp5 => Cp4; compartment_1*kdps*Cp5; reaction_7 is "reaction_4";
  reaction_8: Cp6 => Cp5; compartment_1*kdps*Cp6; reaction_8 is "reaction_5";
  reaction_9: A + C1 -> AC1; compartment_1*(kAf*A*C1 - reaction_9_k2*AC1); reaction_9 is "reaction_6";
    reaction_9_k2 = 100;
  reaction_10: A + C2 -> AC2; compartment_1*(kAf*A*C2 - reaction_10_k2*AC2); reaction_10 is "reaction_7";
    reaction_10_k2 = 1000;
  reaction_11: A + C3 -> AC3; compartment_1*(kAf*A*C3 - reaction_11_k2*AC3); reaction_11 is "reaction_8";
    reaction_11_k2 = 10000;
  reaction_12: A + C4 -> AC4; compartment_1*(kAf*A*C4 - reaction_12_k2*AC4); reaction_12 is "reaction_9";
    reaction_12_k2 = 100000;
  reaction_13: A + C5 -> AC5; compartment_1*(kAf*A*C5 - reaction_13_k2*AC5); reaction_13 is "reaction_10";
    reaction_13_k2 = 1000000;
  reaction_14: AC1 => C2 + A; compartment_1*kpf*AC1; reaction_14 is "reaction_11";
  reaction_15: AC2 => C3 + A; compartment_1*kpf*AC2; reaction_15 is "reaction_12";
  reaction_16: AC3 => C4 + A; compartment_1*kpf*AC3; reaction_16 is "reaction_13";
  reaction_17: AC4 => C5 + A; compartment_1*kpf*AC4; reaction_17 is "reaction_14";
  reaction_18: AC5 => C6 + A; compartment_1*kpf*AC5; reaction_18 is "reaction_15";
  reaction_19: C6 => Cp6; compartment_1*kdps*C6; reaction_19 is "reaction_16";
  reaction_20: Cp0 => C0; compartment_1*kdps*Cp0; reaction_20 is "reaction_17";

  // Unit definitions:
  unit time = 3600 second;
  unit substance = 1e-6 mole;
end
