// SBML level 2 version 1

model KaiCNet_COnly_T25()
  // KaiC Network with KaiC only

  // Compartments:
  compartment Comp = 1; Comp is "Compartment";

  // Species:
  species C0 in Comp = 0;
  species C0tilde in Comp = 0;
  species C1 in Comp = 0;
  species C1tilde in Comp = 0;
  species C2 in Comp = 0.48;
  species C2tilde in Comp = 0;
  species C3 in Comp = 0.52;
  species C3tilde in Comp = 0;
  species C4 in Comp = 0;
  species C4tilde in Comp = 0;
  species C5 in Comp = 0;
  species C5tilde in Comp = 0;
  species C6 in Comp = 0;
  species C6tilde in Comp = 0;

  // Parameters:
  T = 298;
  kT = 300;
  log_alphaps = 19.66708;
  Eps_kT = 23.13021;
  log_alphapstilde = 28.17906;
  Epstilde_kT = 22.48357;
  log_alphadps = 26.69981;
  Edps_kT = 21.15181;
  log_alphadpstilde = 20.00024;
  Edpstilde_kT = 23.75409;
  log_alphaf0 = 18.39857;
  Ef0_kT = 19.48299;
  log_alphab0 = 23.38166;
  Eb0_kT = 17.31188;
  log_alphaf1 = 19.58871;
  Ef1_kT = 21.20479;
  log_alphab1 = 21.9513;
  Eb1_kT = 15.99611;
  log_alphaf2 = 26.06287;
  Ef2_kT = 19.96113;
  log_alphab2 = 15.22823;
  Eb2_kT = 19.48073;
  log_alphaf3 = 21.22305;
  Ef3_kT = 21.04833;
  log_alphab3 = 20.52758;
  Eb3_kT = 15.32666;
  log_alphaf4 = 22.67216;
  Ef4_kT = 13.72692;
  log_alphab4 = 21.016;
  Eb4_kT = 14.50841;
  log_alphaf5 = 21.06881;
  Ef5_kT = 21.45168;
  log_alphab5 = 20.74409;
  Eb5_kT = 14.60301;
  log_alphaf6 = 21.27653;
  Ef6_kT = 21.80818;
  log_alphab6 = 18.70739;
  Eb6_kT = 17.77473;

  // Assignment rules:
  alphaps := exp(log_alphaps);
  Eps := kT*Eps_kT;
  alphapstilde := exp(log_alphapstilde);
  Epstilde := kT*Epstilde_kT;
  alphadps := exp(log_alphadps);
  Edps := kT*Edps_kT;
  alphadpstilde := exp(log_alphadpstilde);
  Edpstilde := kT*Edpstilde_kT;
  kps := alphaps*exp(-Eps/T);
  kpstilde := alphapstilde*exp(-Epstilde/T);
  kdps := alphadps*exp(-Edps/T);
  kdpstilde := alphadpstilde*exp(-Edpstilde/T);
  alphaf0 := exp(log_alphaf0);
  Ef0 := kT*Ef0_kT;
  alphab0 := exp(log_alphab0);
  Eb0 := kT*Eb0_kT;
  f0 := alphaf0*exp(-Ef0/T);
  b0 := alphab0*exp(-Eb0/T);
  alphaf1 := exp(log_alphaf1);
  Ef1 := kT*Ef1_kT;
  alphab1 := exp(log_alphab1);
  Eb1 := kT*Eb1_kT;
  f1 := alphaf1*exp(-Ef1/T);
  b1 := alphab1*exp(-Eb1/T);
  alphaf2 := exp(log_alphaf2);
  Ef2 := kT*Ef2_kT;
  alphab2 := exp(log_alphab2);
  Eb2 := kT*Eb2_kT;
  f2 := alphaf2*exp(-Ef2/T);
  b2 := alphab2*exp(-Eb2/T);
  alphaf3 := exp(log_alphaf3);
  Ef3 := kT*Ef3_kT;
  alphab3 := exp(log_alphab3);
  Eb3 := kT*Eb3_kT;
  f3 := alphaf3*exp(-Ef3/T);
  b3 := alphab3*exp(-Eb3/T);
  alphaf4 := exp(log_alphaf4);
  Ef4 := kT*Ef4_kT;
  alphab4 := exp(log_alphab4);
  Eb4 := kT*Eb4_kT;
  f4 := alphaf4*exp(-Ef4/T);
  b4 := alphab4*exp(-Eb4/T);
  alphaf5 := exp(log_alphaf5);
  Ef5 := kT*Ef5_kT;
  alphab5 := exp(log_alphab5);
  Eb5 := kT*Eb5_kT;
  f5 := alphaf5*exp(-Ef5/T);
  b5 := alphab5*exp(-Eb5/T);
  alphaf6 := exp(log_alphaf6);
  Ef6 := kT*Ef6_kT;
  alphab6 := exp(log_alphab6);
  Eb6 := kT*Eb6_kT;
  f6 := alphaf6*exp(-Ef6/T);
  b6 := alphab6*exp(-Eb6/T);
  p := (0*(C0 + C0tilde) + 1*(C1 + C1tilde) + 2*(C2 + C2tilde) + 3*(C3 + C3tilde) + 4*(C4 + C4tilde) + 5*(C5 + C5tilde) + 6*(C6 + C6tilde))/(6*(C0 + C0tilde) + 6*(C1 + C1tilde) + 6*(C2 + C2tilde) + 6*(C3 + C3tilde) + 6*(C4 + C4tilde) + 6*(C5 + C5tilde) + 6*(C6 + C6tilde));

  // Rate rules:
  C0' = kdps*C1 - kps*C0 + b0*C0tilde - f0*C0;
  C0tilde' = kdpstilde*C1tilde - kpstilde*C0tilde - b0*C0tilde + f0*C0;
  C1' = kps*C0 + kdps*C2 - (kps + kdps)*C1 + b1*C1tilde - f1*C1;
  C1tilde' = kpstilde*C0tilde + kdpstilde*C2tilde - (kpstilde + kdpstilde)*C1tilde - b1*C1tilde + f1*C1;
  C2' = kps*C1 + kdps*C3 - (kps + kdps)*C2 + b2*C2tilde - f2*C2;
  C2tilde' = kpstilde*C1tilde + kdpstilde*C3tilde - (kpstilde + kdpstilde)*C2tilde - b2*C2tilde + f2*C2;
  C3' = kps*C2 + kdps*C4 - (kps + kdps)*C3 + b3*C3tilde - f3*C3;
  C3tilde' = kpstilde*C2tilde + kdpstilde*C4tilde - (kpstilde + kdpstilde)*C3tilde - b3*C3tilde + f3*C3;
  C4' = kps*C3 + kdps*C5 - (kps + kdps)*C4 + b4*C4tilde - f4*C4;
  C4tilde' = kpstilde*C3tilde + kdpstilde*C5tilde - (kpstilde + kdpstilde)*C4tilde - b4*C4tilde + f4*C4;
  C5' = kps*C4 + kdps*C6 - (kps + kdps)*C5 + b5*C5tilde - f5*C5;
  C5tilde' = kpstilde*C4tilde + kdpstilde*C6tilde - (kpstilde + kdpstilde)*C5tilde - b5*C5tilde + f5*C5;
  C6' = kps*C5 - kdps*C6 + b6*C6tilde - f6*C6;
  C6tilde' = kpstilde*C5tilde - kdpstilde*C6tilde - b6*C6tilde + f6*C6;
end
